@DSL Default;
@Behaviour desmorat20152d;
@Author Breno Ribeiro Nogueira, Flavien Loiseau;
@Date 08 / 02 / 2023;

@Includes{
  #include "TFEL_MatrixFunc.hxx"
}

@MaterialProperty stress young;
young.setGlossaryName("YoungModulus");
@MaterialProperty real nu;
nu.setGlossaryName("PoissonRatio");

@MaterialProperty real B;
B.setEntryName("Brittleness");
@MaterialProperty real k0;
k0.setEntryName("Kappa0");
@MaterialProperty real S;
S.setEntryName("BigS");
@MaterialProperty real s;
s.setEntryName("SmallS");

// H-Id
@StateVariable Stensor rH; //Ladeveze variable minus identity
@StateVariable Stensor d;  //Damage tensor

//Plane strain hypothesis
@ModellingHypothesis PlaneStrain;

// Define constant local variables
@LocalVariable stensor<2u,real>  I2;

@InitLocalVariables{
    // Define constants
    I2(0) = 1.;
    I2(1) = 1.;
    I2(2) = 0.;
    I2(3) = 0.;
}

@ProvidesSymmetricTangentOperator;

@Integrator{
  static_cast<void>(computeTangentOperator_);
  const auto K = (young) / (2. * (1. - nu));
  const auto G = computeMu(young, nu);
  const auto tr_sig = sig|I2;

  // approximation: the triaxilaty is assumed to be constant
  const auto Rv = [&tr_sig, this] {
    if (tr_sig > 0) {
      return min(real(1), B);
    }
    const auto sigpri2d = sig - 1./2. * tr_sig * I2;
    const auto seq = sqrt(2*(sigpri2d|sigpri2d));
    // const auto seq = sigmaeq(sig);
    if (seq > 1e-12 * young) {
      const auto Tx = tr_sig / (2. * seq);
      //const auto Rv1 = 1. + 9. * (1. - 2.* nu) / (3. * (1. + nu)) * Tx * Tx; // correct ?
      const auto Rv1 = 1. + 9. * (1. - 2. * nu) / (2. * (1. + nu)) * Tx * Tx; // ??????
      return min(Rv1, B);
    }
    return B;
  }();

  // total strain at the end of the time step
  const auto e = eval(eto + deto);
  const auto tr_e = e|I2;
  // positive part of the strain
  const auto ep = positive_part(e);
  // Mazars' equivalent strain
  const auto e_mazars = sqrt(ep | ep);
  // damage evolution
  const auto Rv_s = pow(Rv, s);
  //const auto imetric = Stensor::Id() - d;
  //const auto metric = invert(imetric);
  const auto tr_rH = rH|I2;

  // yield strain
  const auto ey = k0 + S * Rv_s * tr_rH;
  if (e_mazars > ey) {
    const auto et = (-nu / young) * tr_sig * I2 + ((1 + nu) / young) * sig;
    // positive part of the strain
    const auto etp = positive_part(et);
    // updated trace of H-I value so e_mazars=ey
    const auto ntr_rH = (e_mazars - k0) / (S * Rv_s);
    // lagrange multiplier
    const auto dl = (ntr_rH - tr_rH) / (etp|I2);
    // updating the damage
    // fH -= dl*etp; (for implicit)
    rH += dl * etp;
  }
  // computing the stress
  const auto H = rH + I2;
  const auto iH = tfel::math::extensions::myInvert(eval(H));
  const auto iH2 = square(iH);
  // retirer le max
  const auto tr_iH2 = (iH2|I2);


  if (tr_e > 0) {
    // retirer le max
    const auto tr_H2 = H | H;
    // calcul de iH*e*iH probably changes in 2D
    sig = 2. * G * (symmetric_product_aba(iH, e) - (iH2 | e) * iH2 / tr_iH2) +
          2. * K / tr_H2 * tr_e * I2;
    if(computeTangentOperator_){
    	//Dt = 2. * G*(symmetric_product_derivative_daba_db(iH)- (iH2^iH2)/tr_iH2) + 2. * K / tr_H2 * (I2^I2);
    	Dt = 2. * G*(symmetric_product_derivative_daba_db(I2)- (I2^I2)/2) +  K * (I2^I2);
    }
  } else {
    sig = 2. * G * (symmetric_product_aba(iH, e) - (iH2 | e) * iH2 / tr_iH2) +
          K * tr_e * I2;
    if(computeTangentOperator_){
    	//Dt = 2. * G*(symmetric_product_derivative_daba_db(iH)- (iH2^iH2)/tr_iH2) +  K * (I2^I2);
    	Dt = 2. * G*(symmetric_product_derivative_daba_db(I2)- (I2^I2)/2) +  K * (I2^I2);
    }
  }
  d = I2 - iH2;
}
